FINISH  		! Totoje komentar= skoncit cierne procesory
/CLEAR			! Nova analyza

!pouzivam konzistne jednotky mm, N , MPa
!jednotky mm,N,MPa

/PNUM, LINE, 1

KEYW,PR_SET,1   	! 1: typ analizy 1 = mechanicka analyza
KEYW,PR_STRUC,1 	! structural


/PREP7
ET,1,PLANE182   		! 2a element type,  2D , 4 node mechanika
KEYOPT,1,3,3			! keyoptioon c 3 na hodnotu 3 (with thicknes)

				! nastavenie konštanty pre element type, thk=30mm
R,1,2,   			! 2b real constatnt cislo 1 pre thk = 2 mm, konstatnta pre hrubku telesa, poyòuzivam koinyòzsitentene jednotky

MP, EX, 1, 214e3		! 3 modul pruznosti 214GPa pre material cislo 1
MP, PRXY, 1, 0.3		! poisonovo cislo pre material 1 ´= 0.3


!GEOMETRIA

K,,11, 0
K,,6, 0
K,,6, 20
K,,26, 35
K,,34, 35
K,,42, 35

K,,70,30
K,,90, 25

K,,103, 54
K,,108, 54
K,,108, 49


K,,90,20
K,,70,25
K,,43,30

K,,71, 15
K,,71, 0
K,,66,0
K,,66,15
K,,42,23
K,,34,32
K,,26,27
K,,26,25
K,,11,20


*DO,i,1,22 		!cyklus pocitadlo od 0 po 26
L,i, i+1		! vykresli ciari medzi bodmi v poradi
*ENDDO			!koniec cyklu

L, 23,1


LFILLT, 2, 3, 5
LFILLT, 6, 5, 10
LFILLT, 8, 7, 20

LFILLT, 6, 7, 10

LFILLT, 11, 12, 20


LFILLT, 13, 14, 2
LFILLT, 17, 18, 8

lplot


!LFILLT, 10, 11, 20
!LFILLT, 3, 4, 25
!LFILLT, 20, 19, 15
!LFILLT, 15, 14, 12
!LFILLT, 11, 12, 15
!LFILLT, 9, 10, 3
!LFILLT, 9, 8, 3
!LFILLT, 18, 19, 2
!!LFILLT, 33, 35, 2
!LFILLT, 4,5, 40
!LFILLT, 6,5, 20
!LFILLT, 6,30, 5


AL, ALL


CYL4, 34, 27, 10
AADD, 1,2


LFILLT, 36,41, 3

AL, 5,4, 18
AADD, 3,1


LFILLT, 38,42, 5

AL, 19,5, 18
AADD, 2,1
/eof

CYL4, 34, 27, 8

ASEL, S, AREA,,			!select plochy "AREA" cislo 1 az 2  skrokom 1, nova sada "s"


CM, kruzky, AREA		!mnozina  vsetkych aktualne vybranych ploch pod nayvom kruzky
ALLSEL, ALL			!select all (KP, L, A, V , N, E)
ASBA, 3, kruzky 		!substract areas


AL, ALL

/PNUM,KP,1

AESIZE, ALL,10e-1		!nastavenie velkosti elementu pre plochu 1

AMESH, ALL


DL,10,1,ALL,0
DL,9,1,ALL,0

DL,20,,SYMM
DL,19,,SYMM
DL,18,,SYMM
DL,17,,SYMM


LSEL,S, , , 1
NSLL,S,1

*GET, pocnodov, NODE, 0 , COUNT		!pocet aktualne vybranych nodov dopremenj pocnodov ! zistenie poctu nodov do skalarnej premennej pocnodov

F, ALL, FY, (230)/pocnodov	!sila na nody (vybrane) definovanie sily v -y smere do vsetkych vybratych nodov
ALLSELL, ALL

FINISH
/SOL

SOLVE

/eof


RECTING, 0,110, -10, 10		!vytvarame obdlyòznik x od 0 po 110 mm, y od -10 po 10 mm
RECTING, 95, 110, -82.5, 10

PCIRC,0,10,0,360,		!vytvaram kruh plny na x=0, y=0 rad = 10 mm
CYL4, 102.5, -82.5, 7.5

AADD, ALL 			!zlucit vsetky plochy do jednej


!delete plochy aby sme mohli robit zaoblenia, KP a Lines sa zachovaju
ADELE, ALL

!ZAOBLENIA
LFILLT, 2, 20, 5
LFILLT, 18,24, 10

!vytvorit plochu
Al, ALL


PCIRC, 7.5			!vytvaram kruh plny na x=0, y=0 rad = 7.5 mm
CYL4, 102.5, -82.5, 5		!kruh na pozici s radiusom

!ASBA, 5,1
!ASBA, 3,2

ASEL, S, AREA,, 2,3		!select plochy "AREA" cislo 1 az 2  skrokom 1, nova sada "s"
CM, kruzky, AREA		!mnozina  vsetkych aktualne vybranych ploch pod nayvom kruzky
ALLSEL, ALL			!select all (KP, L, A, V , N, E)
ASBA, 1, kruzky 		!substract areas


!MESHING
AESIZE, ALL, 1			!nastavenie velkosti elementu pre vsetky plochy
AMESH, ALL			!vymeshuj vsetky plochy


!DL, 4,,ALL, 0			!6. Votknutie... ux = 0 uy = 0, votkunut ciarky z prislusnej plochy
!DL, 5,,ALL, 0
!DL, 6,,ALL, 0
!DL, 7,,ALL, 0

!LEPSIE RIESENIE CEZ SELECTION
CSYS,1				! vybratie cylindrickeho sur. systemu rotacia okolo osi Z
LSEL,S,LOC,X,7,8 		! vybratie novej sady ciar ktore su v medzikruzi 7 az 8 mm od stredu sur. systemu
DL,ALL,1,ALL,0			! na vsetky vybrate ciary aplikovat votknutie (displacement 0)
ALLSEL,ALL


!definovanie zatazenia
!sila posoby na plochu - treba vybrat elementy naa Line

!LSEL, S, LINE,,10,11,		! vyber spodnych ciar  LEPSIE RIESENIE JE NIZSIE!!!!!

CSYS,0				! vybratie kartezskeho systemu
WPOFFS,102.5,-82.5 		! posun working plane do suradnic x,y
CSWPLA,11,1			! vytvor user coordinate system cylindricky uzivatelsky v origine working plane
LSEL,S,LOC,X,4,6		! vyber ciar v medzikruzi so stredom v origine working plane
LSEL,R,LOC,Y,180,360		! vyber ciar podla uhlu (spodne ciary)

NSLL, S, 1				! vyber vsetkych nodov z vybratych ciar vratane koncovych nodov
*GET, pocnodov, NODE, 0 , COUNT		!pocet aktualne vybranych nodov dopremenj pocnodov ! zistenie poctu nodov do skalarnej premennej pocnodov

F, ALL, FY, -(500*9.81)/pocnodov	!sila na nody (vybrane) definovanie sily v -y smere do vsetkych vybratych nodov
ALLSELL, ALL				! zrusenie vybratia ciar a nodov - vybratie vsetkych komponent


CSYS,0	! vybratie kartezskeho systemu


FINISH
/SOL

SOLVE


/POST1
PLDISP,2
PLNSOL,S,EQV
